1/(s*C)*(r + s*L)/(r + s*L + 1/(s*C)) == (r + s*L)/(1 + s*r*C + s^2*L*C) == K*(1 + s/ω_z)/(1 + s/(ω_0*Q) + s^2/ω_0^2)
f_mag(ω) := sqrt(K*(1 + ω^2/ω_z^2)/((1 - ω^2/ω_0^2)^2 + (ω/(ω_0*Q))^2))
f_mag(ω) := 10*log(K) + 10*log(1 + ω^2/ω_z^2) - 10*log((1 - ω^2/ω_0^2)^2 + (ω/(ω_0*Q))^2)
grad(ω) := [d/dL(f_mag(ω)); d/dr(f_mag(ω)); d/dC(f_mag(ω))]
f_mag(ω) := sqrt((r^2 + (ω*L)^2)/((1 - ω^2*L*C)^2 + (ω*r*C)^2))
f_mag(ω) := 10*log((r^2 + (ω*L)^2)/((1 - ω^2*L*C)^2 + (ω*r*C)^2))
f_mag(ω) := 10*log(r^2 + (ω*L)^2) - 10*log((1 - ω^2*L*C)^2 + (ω*r*C)^2)  # disabled
grad(ω) := [d/dL(f_mag(ω)); d/dr(f_mag(ω)); d/dC(f_mag(ω))]
grad(ω) simplify → [
    (20*L*ω^2 - 20*C*L^2*ω^4 + 20*C*ω^2*r^2)/(ln(10)*(L^2*ω^2 + r^2)*(C^2*L^2*ω^4 + C^2*ω^2*r^2 - 2*C*L*ω^2 + 1));
    (20*r - 40*C*L*ω^2*r)/(ln(10)*(L^2*ω^2 + r^2)*(C^2*L^2*ω^4 + C^2*ω^2*r^2 - 2*C*L*ω^2 + 1));
    -20*ω^2*(C*L^2*ω^2 - L + C*r^2)/(ln(10)*(C^2*L^2*ω^4 + C^2*ω^2*r^2 - 2*C*L*ω^2 + 1))
]
grad_1(ω) := 20/ln(10)*1/((1 - C*L*ω^2)^2 + (ω*r*C)^2)*[
    1/(r^2 + (L*ω)^2)*L*ω^2*(1 - C*L*ω^2 + C/L*r^2);
    r/(r^2 + (L*ω)^2)*(1 - 2*C*L*ω^2);
    L*ω^2*(1 - C*L*ω^2 - C/L*r^2)
]
grad_1(ω) := 1/sqrt((r^2 + (ω*L)^2)/((1 - ω^2*L*C)^2 + (ω*r*C)^2))*1/((1 - ω^2*L*C)^2 + (ω*r*C)^2)^2*[ω^2*L*(1 - C*L*ω^2 + C/L*r^2); r*(1 - 2*C*L*ω^2); ω^2*L*(r^2 + (ω*L)^2)*(1 - C*L*ω^2 - C/L*r^2)]  # disabled
grad(ω)[0]/grad_1(ω)[0] simplify → 1
grad(ω)[1]/grad_1(ω)[1] simplify → 1
grad(ω)[2]/grad_1(ω)[2] simplify → 1
